units		electron
atom_style	full

pair_style lj/cut/coul/long 18.000
#bond_style      harmonic
bond_style      class2
angle_style     harmonic
kspace_style	pppm 0.0001

read_data	data.lmp

pair_coeff  1  1  0.000089126 5.29123
pair_coeff  1  2  0.000150620 5.50666
pair_coeff  2  2  0.000254542 5.72209

neighbor	2.0 bin

timestep	0.00025

#velocity all create 298.0 2345187

#thermo_style	multi
#thermo		1

#fix		1 all nvt temp 298.0 298.0 30.0 tchain 1
#fix 1 all nve
fix 1 all ipi co2.exm.E0_2.0412414523193152e-05.traj_21 32345 unix

#dump		1 all xyz 25 dump.xyz

run		100000000
